*Heading
 Linear quasistatic analysis; LEBIM interface
** Job name: DCBISOFFMpmteV2 Model name: DCBIso_lebimumat
** Generated by: Abaqus/CAE 6.14-1
*Preprint, echo=NO, model=NO, history=NO, contact=NO
**
** PARTS
**
*Part, name=ADHESIVE
*Node
      1,           0.,           0.
      2,  0.150000006,           0.
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*Element, type=CPE4
   1,    1,    2, 1583, 1582
   2,    2,    3, 1584, 1583
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*Nset, nset=Adhesive, generate
    1,  3162,     1
*Elset, elset=Adhesive, generate
    1,  1580,     1
*Elset, elset=_Adhesive-Top_S3, internal, generate
    1,  1580,     1
*Surface, type=ELEMENT, name=Adhesive-Top
_Adhesive-Top_S3, S3
*Elset, elset=_Adhesive-Bottom_S1, internal, generate
    1,  1580,     1
*Surface, type=ELEMENT, name=Adhesive-Bottom
_Adhesive-Bottom_S1, S1
*Orientation, name=Ori-4
          0.,           1.,           0.,          -1.,           0.,           0.
3, 0.
** Section: AdhesiveSection
*Solid Section, elset=Adhesive, orientation=Ori-4, stack direction=1, material=AdhesiveLEBIM
,
*End Part
**
*Part, name=BOTTOM
*Node
      1,         237.,         -1.5
      2,         237.,           0.
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*Element, type=CPE4
    1,     1,     9,  3322,  3183
    2,     9,    10,  3323,  3322
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*Nset, nset=BOTTOM, generate
     1,  18117,      1
*Elset, elset=BOTTOM, generate
     1,  16460,      1
*Nset, nset=BottomBCset
 1,
** Section: DCBeamSection
*Solid Section, elset=BOTTOM, material=BeamMat
,
*End Part
**
*Part, name=TOP
*Node
      1,         237.,           0.
      2,         237.,  0.150000006
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*Element, type=CPE4
    1,     1,     2,    13,    12
    2,     2,     3,    14,    13
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*Nset, nset=TOP, generate
     1,  18117,      1
*Elset, elset=TOP, generate
     1,  16460,      1
*Nset, nset=TopBCset
 11,
** Section: DCBeamSection
*Solid Section, elset=TOP, material=BeamMat
,
*End Part
**
**
** ASSEMBLY
**
*Assembly, name=Assembly
**
*Instance, name=ADHESIVE-1, part=ADHESIVE
*End Instance
**
*Instance, name=TOP-1, part=TOP
          0.,         0.01,           0.
*End Instance
**
*Instance, name=BOTTOM-1, part=BOTTOM
*End Instance
**
*Elset, elset=AssemblySet, instance=ADHESIVE-1, generate
    1,  1580,     1
*Elset, elset=AssemblySet, instance=TOP-1, generate
     1,  16460,      1
*Elset, elset=AssemblySet, instance=BOTTOM-1, generate
     1,  16460,      1
*Nset, nset=BottomBCNode, instance=BOTTOM-1
 13,
*Elset, elset=NINTERFACE, instance=ADHESIVE-1, generate
    1,  1580,     1
*Nset, nset=Set-3, instance=ADHESIVE-1
    1, 1582
*Elset, elset=Set-3, instance=ADHESIVE-1
 1,
*Nset, nset=TopBCNode, instance=TOP-1
 6,
*Elset, elset=_ADHESIVE_bottom_S1, internal, instance=ADHESIVE-1, generate
    1,  1580,     1
*Surface, type=ELEMENT, name=ADHESIVE_bottom
_ADHESIVE_bottom_S1, S1
*Elset, elset=_AHESIVE_top_S3, internal, instance=ADHESIVE-1, generate
    1,  1580,     1
*Surface, type=ELEMENT, name=AHESIVE_top
_AHESIVE_top_S3, S3
*Elset, elset=_BOTTOM_adhesive_S2, internal, instance=BOTTOM-1, generate
    10,  15800,     10
*Surface, type=ELEMENT, name=BOTTOM_adhesive
_BOTTOM_adhesive_S2, S2
*Elset, elset=_TOP_adhesive_S4, internal, instance=TOP-1, generate
     1,  15791,     10
*Surface, type=ELEMENT, name=TOP_adhesive
_TOP_adhesive_S4, S4
** Constraint: BOTTOM_ADHESIVE
*Tie, name=BOTTOM_ADHESIVE, adjust=yes
ADHESIVE_bottom, BOTTOM_adhesive
** Constraint: TOP_ADHESIVE
*Tie, name=TOP_ADHESIVE, adjust=yes
AHESIVE_top, TOP_adhesive
*End Assembly
*Amplitude, name=Amp-1
             0.,              1.,              1.,              1.
**
** MATERIALS
**
** User material of the joint interface: Linear Elastic Brittle Interface Model
*Material, name=AdhesiveLEBIM
*Depvar
     12,
*User Material, constants=6
 7.5, 0.09375,      0.,    0.25,    0.01,      8.
*Material, name=BeamMat
*Elastic
135000., 0.3
**
** BOUNDARY CONDITIONS
**
** Name: BC-1 Type: Displacement/Rotation
*Boundary
BottomBCNode, 1, 1
** Name: BC-3 Type: Displacement/Rotation
*Boundary
TopBCNode, 1, 1
** Name: BC-5 Type: Displacement/Rotation
*Boundary
Set-3, 2, 2
** ----------------------------------------------------------------
**
** STEP: Step-1
**
*Step, name=Step-1, nlgeom=NO, inc=1
Linear, quasistatic step
*Static, direct
1., 1.,
**
** OUTPUT REQUESTS
**
**Restart, write, frequency=0
**
** FIELD OUTPUT: F-Output-1
**
*Output, field
*Node Output
U,
**
** FIELD OUTPUT: F-Output-2
**
*Node Output, nset=BottomBCNode
RF, TF, U
**
** FIELD OUTPUT: F-Output-4
**
*Element Output, elset=NINTERFACE, directions=YES
EVOL, S, SDV
**
** FIELD OUTPUT: F-Output-3
**
**
** FIELD OUTPUT: F-Output-6
**
*Element Output, elset=TOP-1.TOP, directions=YES
S,
**
** FIELD OUTPUT: F-Output-5
**
*Node Output, nset=TopBCNode
TF, U
**
** HISTORY OUTPUT: H-Output-1
**
*Output, history
*Energy Output
ALLSE, ALLWK
**
** HISTORY OUTPUT: H-Output-3
**
*Node Output, nset=BottomBCNode
TF2, U2
**
** HISTORY OUTPUT: H-Output-2
**
*Node Output, nset=TopBCNode
TF2, U2
*End Step
